# 2. Проектирование
# 2.1. Проектирование стабилизатора напряжения
Uвх := 8 V
Iнmax := 400 mA
αmax := 0.12
αmin := 0.1
Uвх.стmin := Uвх + 3 V = 11 V
Uвх.ст.ном := Uвх.стmin/(1 - αmin) = 12.2222 V
Uвх.стmax := Uвх.ст.ном*(1 + αmax) = 13.6889 V
Iвх.стmax := 1.2*Iнmax = 480 mA
